a[1] := 2
a[2] := 1 + rnd(2)
a[3] := 1
И := 4
Ф := 4
a[0] := -И
k := И*Ф
t := Ф
y(x) := a[3]*x^3 + a[2]*x^2 + a[1]*x + a[0] - k*sin(t*x)
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x := 0, 0.1 .. 10
root(y(x), x, 0, 1) = 0.804502
x = [
    0; 0.1; 0.2; 0.3; 0.4; 0.5; 0.6; 0.7; 0.8; 0.9
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]
y(x) = [
    -4; -10.0197; -15.0296; -18.1954; -18.9688; -17.1731; -13.0305; -7.12557; -0.31239; 6.42138
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]
root(y(x), x, 1.5, 2) = 1.68369
root(y(x), x, 1.9, 2.5) = 2.096
|0.805 - 0.8| = 0.005
|1.684 - 1.7| = 0.016
|2.096 - 2.1| = 0.004
