a[1] := 2
a[2] := 1 + rnd(2)
a[3] := 1
И := 9
Ф := 5
a[0] := -И
k := И*Ф
t := Ф
y(x) := a[3]*x^3 + a[2]*x^2 + a[1]*x + a[0] - k*sin(t*x)
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x := 0, 0.1 .. 10
x = [
    0; 0.1; 0.2; 0.3; 0.4; 0.5; 0.6; 0.7; 0.8; 0.9
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]
y(x) = [
    -9; -30.3631; -46.4181; -53.17; -48.894; -34.5556; -13.5735; 9.01949; 27.8097; 38.3299
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]
root(y(x), x, 0, 1) = 0.659371
x := 0.68
x := 1.8
root(y(x), x, 1, 1.5) = 1.2431
x := 1.2
x := 2.6
root(y(x), x, 1.5, 2) = 1.86408
x := 3
root(y(x), x, 2, 2.8) = 2.60944
root(y(x), x, 2.8, 3.5) = 2.98107
|0.659 - 0.68| = 0.021
|1.243 - 1.2| = 0.043
|1.864 - 1.8| = 0.064
|2.609 - 2.6| = 0.009
|2.981 - 3| = 0.019
