f(x) := x/sqrt(1 + x)
N := 10000
Sпр := 4.5
I := integral(f(x), x = 0 .. 3) = 2.66667
i := 0 .. N - 1
X[i] := rnd(3)
Y[i] := rnd(1.5)
T[i] := if(f(X[i]) > Y[i], 1, 0)
n := sum(T[i], i = 0 .. N - 1) = 5944
Sф := n*Sпр/N = 2.6748
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Error := |Sф - I|/I = 0.00305
